Fri Nov 24 16:45:23 EST 2023
$PROBLEM From bbr: see 1000-FOCE.yaml for details

$INPUT C NUM ID TIME SEQ CMT EVID AMT DV AGE WT HT EGFR ALB BMI SEX AAG
  SCR AST ALT CP TAFD TAD LDOS MDV BLQ PHASE

$DATA ../../../data/derived/analysis3.csv IGNORE=(C='C', BLQ=1)

$SUBROUTINE ADVAN4 TRANS4

$PK

;log transformed PK parms

  V2WT   = LOG(WT/70)
  CLWT   = LOG(WT/70) * 0.75
  V3WT   = LOG(WT/70)
  QWT    = LOG(WT/70) * 0.75

  MU_1   = THETA(1)
  MU_2   = THETA(2) + V2WT
  MU_3   = THETA(3) + CLWT
  MU_4   = THETA(4) + V3WT
  MU_5   = THETA(5) + QWT

  KA     = EXP(MU_1 + ETA(1))
  V2     = EXP(MU_2 + ETA(2))
  CL     = EXP(MU_3 + ETA(3))
  V3     = EXP(MU_4 + ETA(4))
  Q      = EXP(MU_5 + ETA(5))

  S2     = V2/1000 ; dose in mcg, conc in mcg/mL

$ERROR

  IPRED = F
  Y     = IPRED * (1 + EPS(1))

$THETA  ; log values
  (0.5)   ;  1 KA (1/hr) - 1.5
  (3.5)   ;  2 V2 (L) - 60
  (1)     ;  3 CL (L/hr) - 3.5
  (4)     ;  4 V3 (L) - 70
  (2)     ;  5 Q  (L/hr) - 4

$OMEGA BLOCK(3)
  0.2   ;ETA(KA)
  0.01 0.2   ;ETA(V2)
  0.01 0.01 0.2   ;ETA(CL)

$OMEGA
  0 FIX    ; ETA(V3)
  0 FIX    ; ETA(Q)

$SIGMA
  0.05     ; 1 pro error

$EST MAXEVAL=9999 METHOD=1 INTER SIGL=6 NSIG=3 PRINT=1 MSFO=./1000-FOCE.msf
$COV PRINT=E
$TABLE NUM CL V2 Q V3 KA ETAS(1:LAST) IPRED NPDE CWRES NOPRINT ONEHEADER FILE=1000-FOCE.tab

NM-TRAN MESSAGES
 WARNINGS AND ERRORS (IF ANY) FOR PROBLEM    1
 (WARNING  2) NM-TRAN INFERS THAT THE DATA ARE POPULATION.
 (MU_WARNING 26) DATA ITEM(S) USED IN DEFINITION OF MU_(S) SHOULD BE CONSTANT FOR INDIV. REC.:
  WT
 LIM VALUES MAXLIM ASSESSED BY NMTRAN: 1,2,3,4,5,6,7,8,10,11,13,15,16
Note: Analytical 2nd Derivatives are constructed in FSUBS but are never used.
      You may insert $ABBR DERIV2=NO after the first $PROB to save FSUBS construction and compilation time

1NONLINEAR MIXED EFFECTS MODEL PROGRAM (NONMEM) VERSION 7.5.1
 ORIGINALLY DEVELOPED BY STUART BEAL, LEWIS SHEINER, AND ALISON BOECKMANN
 CURRENT DEVELOPERS ARE ROBERT BAUER, ICON DEVELOPMENT SOLUTIONS,
 AND ALISON BOECKMANN. IMPLEMENTATION, EFFICIENCY, AND STANDARDIZATION
 PERFORMED BY NOUS INFOSYSTEMS.
 PROBLEM NO.:         1
 From bbr: see 1000-FOCE.yaml for details
 TOT. NO. OF OBS RECS:     3142
 TOT. NO. OF INDIVIDUALS:      160
 TWO COMPARTMENT MODEL WITH FIRST-ORDER ABSORPTION (ADVAN4)
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 #TBLN:      1
 #METH: First Order Conditional Estimation with Interaction
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
 #TERM:
0MINIMIZATION SUCCESSFUL
 NO. OF FUNCTION EVALUATIONS USED:      350
 NO. OF SIG. DIGITS IN FINAL EST.:  3.1

 ETABAR IS THE ARITHMETIC MEAN OF THE ETA-ESTIMATES,
 AND THE P-VALUE IS GIVEN FOR THE NULL HYPOTHESIS THAT THE TRUE MEAN IS 0.

 ETABAR:        -1.8975E-02 -2.8497E-03  1.2811E-03  0.0000E+00  0.0000E+00
 SE:             3.0390E-02  2.1298E-02  3.2219E-02  0.0000E+00  0.0000E+00
 N:                     160         160         160         160         160

 P VAL.:         5.3239E-01  8.9356E-01  9.6828E-01  1.0000E+00  1.0000E+00

 ETASHRINKSD(%)  1.8156E+01  6.3174E+00  8.9837E-01  0.0000E+00  0.0000E+00
 ETASHRINKVR(%)  3.3015E+01  1.2236E+01  1.7887E+00  0.0000E+00  0.0000E+00
 EBVSHRINKSD(%)  1.8022E+01  6.3320E+00  8.7800E-01  0.0000E+00  0.0000E+00
 EBVSHRINKVR(%)  3.2796E+01  1.2263E+01  1.7483E+00  0.0000E+00  0.0000E+00
 RELATIVEINF(%)  3.7623E+01  8.0680E+01  9.6891E+01  0.0000E+00  0.0000E+00
 EPSSHRINKSD(%)  5.2754E+00
 EPSSHRINKVR(%)  1.0272E+01


 TOTAL DATA POINTS NORMALLY DISTRIBUTED (N):         3142
 N*LOG(2PI) CONSTANT TO OBJECTIVE FUNCTION:    5774.6097426581628
 OBJECTIVE FUNCTION VALUE WITHOUT CONSTANT:    30997.907860469291
 OBJECTIVE FUNCTION VALUE WITH CONSTANT:       36772.517603127453
 REPORTED OBJECTIVE FUNCTION DOES NOT CONTAIN CONSTANT

 TOTAL EFFECTIVE ETAS (NIND*NETA):                           480


 #TERE:
 Elapsed estimation  time in seconds:    18.25
 Elapsed covariance  time in seconds:    13.03
 Elapsed postprocess time in seconds:     2.94

 ********************               FIRST ORDER CONDITIONAL ESTIMATION WITH INTERACTION              ********************
 #OBJT:**************                       MINIMUM VALUE OF OBJECTIVE FUNCTION                      ********************
 #OBJV:********************************************    30997.908       **************************************************

 ********************               FIRST ORDER CONDITIONAL ESTIMATION WITH INTERACTION              ********************
 ********************                             FINAL PARAMETER ESTIMATE                           ********************

 THETA - VECTOR OF FIXED EFFECTS PARAMETERS   *********
         TH 1      TH 2      TH 3      TH 4      TH 5
         4.34E-01  4.12E+00  1.12E+00  4.21E+00  1.29E+00

 OMEGA - COV MATRIX FOR RANDOM EFFECTS - ETAS  ********
         ETA1      ETA2      ETA3      ETA4      ETA5
 ETA1
+        2.21E-01
 ETA2
+        6.90E-02  8.27E-02
 ETA3
+        1.34E-01  7.35E-02  1.69E-01
 ETA4
+        0.00E+00  0.00E+00  0.00E+00  0.00E+00
 ETA5
+        0.00E+00  0.00E+00  0.00E+00  0.00E+00  0.00E+00

 SIGMA - COV MATRIX FOR RANDOM EFFECTS - EPSILONS  ****
         EPS1
 EPS1
+        3.99E-02

 OMEGA - CORR MATRIX FOR RANDOM EFFECTS - ETAS  *******
         ETA1      ETA2      ETA3      ETA4      ETA5
 ETA1
+        4.70E-01
 ETA2
+        5.11E-01  2.88E-01
 ETA3
+        6.94E-01  6.22E-01  4.11E-01
 ETA4
+        0.00E+00  0.00E+00  0.00E+00  0.00E+00
 ETA5
+        0.00E+00  0.00E+00  0.00E+00  0.00E+00  0.00E+00

 SIGMA - CORR MATRIX FOR RANDOM EFFECTS - EPSILONS  ***
         EPS1
 EPS1
+        2.00E-01

 ********************               FIRST ORDER CONDITIONAL ESTIMATION WITH INTERACTION              ********************
 ********************                            STANDARD ERROR OF ESTIMATE                          ********************

 THETA - VECTOR OF FIXED EFFECTS PARAMETERS   *********
         TH 1      TH 2      TH 3      TH 4      TH 5
         6.29E-02  2.76E-02  3.28E-02  1.92E-02  3.54E-02

 OMEGA - COV MATRIX FOR RANDOM EFFECTS - ETAS  ********
         ETA1      ETA2      ETA3      ETA4      ETA5
 ETA1
+        5.30E-02
 ETA2
+        2.00E-02  9.83E-03
 ETA3
+        2.36E-02  1.05E-02  1.97E-02
 ETA4
+       ......... ......... ......... .........
 ETA5
+       ......... ......... ......... ......... .........

 SIGMA - COV MATRIX FOR RANDOM EFFECTS - EPSILONS  ****
         EPS1
 EPS1
+        1.23E-03

 OMEGA - CORR MATRIX FOR RANDOM EFFECTS - ETAS  *******
         ETA1      ETA2      ETA3      ETA4      ETA5
 ETA1
+        5.64E-02
 ETA2
+        9.75E-02  1.71E-02
 ETA3
+        6.86E-02  5.24E-02  2.40E-02
 ETA4
+       ......... ......... ......... .........
 ETA5
+       ......... ......... ......... ......... .........

 SIGMA - CORR MATRIX FOR RANDOM EFFECTS - EPSILONS  ***
         EPS1
 EPS1
+        3.07E-03
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
 ********************               FIRST ORDER CONDITIONAL ESTIMATION WITH INTERACTION              ********************
 ********************                      EIGENVALUES OF COR MATRIX OF ESTIMATE                     ********************

             1         2         3         4         5         6         7         8         9        10        11        12
         1.22E-01  1.44E-01  2.03E-01  3.29E-01  3.39E-01  5.43E-01  8.27E-01  8.99E-01  1.21E+00  1.29E+00  2.47E+00  3.63E+00
 Elapsed finaloutput time in seconds:     0.14
 #CPUT: Total CPU Time in Seconds,       35.246
