Fri Nov 24 17:04:42 EST 2023
$PROBLEM 2000pps

$INPUT C ID TIME AMT DV CMT DOSE EVID MDV ADDL II SS FORM WT PER BLQ NUM

$DATA ../../../data/derived/atorvWrkShop3.csv IGNORE=(C='C', BLQ.EQ.1)

$SUBROUTINES ADVAN4 TRANS4

$PK

NWT = LOG(WT/70) ; normalized to 70 kg adult
MU_1 = THETA(1) + NWT * 0.75 ; CL
MU_2 = THETA(2) + NWT        ; V2
MU_3 = THETA(3) + NWT * 0.75 ; Q
MU_4 = THETA(4) + NWT        ; V3
MU_5 = THETA(5)              ; ka

CL = EXP(MU_1 + ETA(1)) ; atv cl
V2 = EXP(MU_2 + ETA(2))
Q  = EXP(MU_3 + ETA(3))
V3 = EXP(MU_4 + ETA(4))
KA = EXP(MU_5 + ETA(5))

S2 = V2/1000          ; DOSE IN mmol & CONC IN nM

$THETA
( 5.65)     ;  THETA(1) TOTAL CL ATV
( 5.6 )      ;  THETA(2) V2
( 4.29)     ;  THETA(3) Q
( 7.07)     ;  THETA(4) V3
( -1.33)    ;  THETA(5) KA

$OMEGA BLOCK(2) ;INITIAL values of OMEGAs
0.1  ; cl
0.003 0.2  ; v2

$OMEGA 0 FIX
$OMEGA 0 FIX
$OMEGA 0 FIX
$OMEGA 0 FIX
$OMEGA 0 FIX

$SIGMA  ;Initial value of SIGMA
0.1; prop

$ERROR

IPRED = F;
Y = IPRED*(1+ERR(1)) ; ATV

$PRIOR NWPRI PLEV=0.999

$THETAP          ; Prior information of THETAS
( 5.65  FIX)     ;  THETA(1) TOTAL CL ATV
( 5.6  FIX)      ;  THETA(2) V2
( 4.29  FIX)     ;  THETA(3) Q
( 7.07  FIX)     ;  THETA(4) V3
( -1.33  FIX)    ;  THETA(5) KA

$THETAPV BLOCK(5)     ;  variances for priors on THETAS (var-cov)
2 FIX ; CL weakly informative
0.00 2  ; V2 weakly informative
0.00 0.00 2  ; Q weakly informative
0.00 0.00 0.00 .0156   ; V3 SE**2 informative
0.00 0.00 0.00 0.00 .00684    ; KA SE**2 informative

$OMEGAP BLOCK(2)   ; prior information for OMEGA
.1003   FIXED         ; cl
.06034    .8477       ; v2

$OMEGAPD (4, FIXED)     ; df for OMEGA prior

$SIGMAP
0.1 FIX           ; 1 prop error

$SIGMAPD (1 FIX)

$EST MAXEVAL=1 METHOD=NUTS INTERACTION CTYPE=0 OLKJDF=2 OVARF=1 NUTS_DELTA=0.95 NBURN =0 NITER = 0 SEED=112019 PRINT=1 NOABORT THIN = 1 RANMETHOD=P PARAFPRINT=10000 BAYES_PHI_STORE=1

$SIML (11229589) (52045789) SUBPROBLEMS=250 TRUE=PRIOR

NM-TRAN MESSAGES
 WARNINGS AND ERRORS (IF ANY) FOR PROBLEM    1
 (WARNING  2) NM-TRAN INFERS THAT THE DATA ARE POPULATION.
 (MU_WARNING 26) DATA ITEM(S) USED IN DEFINITION OF MU_(S) SHOULD BE CONSTANT FOR INDIV. REC.:
  WT
 LIM VALUES MAXLIM ASSESSED BY NMTRAN: 1,2,3,4,5,6,7,8,10,11,13,15,16
Note: Analytical 2nd Derivatives are constructed in FSUBS but are never used.
      You may insert $ABBR DERIV2=NO after the first $PROB to save FSUBS construction and compilation time

1NONLINEAR MIXED EFFECTS MODEL PROGRAM (NONMEM) VERSION 7.5.1
 ORIGINALLY DEVELOPED BY STUART BEAL, LEWIS SHEINER, AND ALISON BOECKMANN
 CURRENT DEVELOPERS ARE ROBERT BAUER, ICON DEVELOPMENT SOLUTIONS,
 AND ALISON BOECKMANN. IMPLEMENTATION, EFFICIENCY, AND STANDARDIZATION
 PERFORMED BY NOUS INFOSYSTEMS.
 PROBLEM NO.:         1
 2000pps
 TOT. NO. OF OBS RECS:      310
 TOT. NO. OF INDIVIDUALS:       39
 TWO COMPARTMENT MODEL WITH FIRST-ORDER ABSORPTION (ADVAN4)
 PROBLEM NO.:           1      SUBPROBLEM NO.:           1
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 SIMULATION STEP PERFORMED
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 Elapsed simulation  time in seconds:     0.00
 #TBLN:      1
 #METH: NUTS Bayesian Analysis
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
 #TERM:
 BURN-IN WAS NOT TESTED FOR CONVERGENCE
 STATISTICAL PORTION WAS NOT PERFORMED

 ETABAR IS THE ARITHMETIC MEAN OF THE ETA-ESTIMATES,
 AND THE P-VALUE IS GIVEN FOR THE NULL HYPOTHESIS THAT THE TRUE MEAN IS 0.

 ETABAR:        -1.2158E-01  5.4147E-01  0.0000E+00  0.0000E+00  0.0000E+00  0.0000E+00  0.0000E+00
 SE:             2.1090E-10  0.0000E+00  0.0000E+00  0.0000E+00  0.0000E+00  0.0000E+00  0.0000E+00
 N:                      39          39           0           0           0           0           0

 P VAL.:         0.0000E+00  0.0000E+00  1.0000E+00  1.0000E+00  1.0000E+00  1.0000E+00  1.0000E+00

 ETASHRINKSD(%)  1.0000E+02  1.0000E+02  0.0000E+00  0.0000E+00  0.0000E+00  0.0000E+00  0.0000E+00
 ETASHRINKVR(%)  1.0000E+02  1.0000E+02  0.0000E+00  0.0000E+00  0.0000E+00  0.0000E+00  0.0000E+00
 EBVSHRINKSD(%)         NaN         NaN  0.0000E+00  0.0000E+00  0.0000E+00  0.0000E+00  0.0000E+00
 EBVSHRINKVR(%)         NaN         NaN  0.0000E+00  0.0000E+00  0.0000E+00  0.0000E+00  0.0000E+00
 RELATIVEINF(%)  0.0000E+00  0.0000E+00  0.0000E+00  0.0000E+00  0.0000E+00  0.0000E+00  0.0000E+00
 EPSSHRINKSD(%)  1.0000E-10
 EPSSHRINKVR(%)  1.0000E-10


 TOTAL DATA POINTS NORMALLY DISTRIBUTED (N):          310
 N*LOG(2PI) CONSTANT TO OBJECTIVE FUNCTION:    569.74189058689706
 OBJECTIVE FUNCTION VALUE WITHOUT CONSTANT:    85703.394131077104
 OBJECTIVE FUNCTION VALUE WITH CONSTANT:       86273.136021664002
 REPORTED OBJECTIVE FUNCTION DOES NOT CONTAIN CONSTANT

 TOTAL EFFECTIVE ETAS (NIND*NETA):                            78
 NIND*NETA*LOG(2PI) CONSTANT TO OBJECTIVE FUNCTION:    143.35441117992895
 OBJECTIVE FUNCTION VALUE WITHOUT CONSTANT:    85703.394131077104
 OBJECTIVE FUNCTION VALUE WITH CONSTANT:       85846.748542257032
 REPORTED OBJECTIVE FUNCTION DOES NOT CONTAIN CONSTANT

 PRIOR CONSTANT TO OBJECTIVE FUNCTION:    10.514955398777966
 OBJECTIVE FUNCTION VALUE WITHOUT CONSTANT:    85703.394131077104
 OBJECTIVE FUNCTION VALUE WITH CONSTANT:       85713.909086475876
 REPORTED OBJECTIVE FUNCTION DOES NOT CONTAIN CONSTANT


 #TERE:
 Elapsed estimation  time in seconds:     0.02

 ********************                              NUTS BAYESIAN ANALYSIS                            ********************
 #OBJT:**************                       AVERAGE VALUE OF LIKELIHOOD FUNCTION                     ********************
 #OBJV:********************************************    85703.394       **************************************************
 #OBJS:********************************************        0.000 (STD) **************************************************

 ********************                              NUTS BAYESIAN ANALYSIS                            ********************
 ********************                             FINAL PARAMETER ESTIMATE                           ********************

 THETA - VECTOR OF FIXED EFFECTS PARAMETERS   *********
         TH 1      TH 2      TH 3      TH 4      TH 5
         6.31E+00  5.39E+00  4.66E+00  6.85E+00 -1.48E+00

 OMEGA - COV MATRIX FOR RANDOM EFFECTS - ETAS  ********
         ETA1      ETA2      ETA3      ETA4      ETA5      ETA6      ETA7
 ETA1
+        3.70E-01
 ETA2
+       -1.44E+00  7.33E+00
 ETA3
+        0.00E+00  0.00E+00  0.00E+00
 ETA4
+        0.00E+00  0.00E+00  0.00E+00  0.00E+00
 ETA5
+        0.00E+00  0.00E+00  0.00E+00  0.00E+00  0.00E+00
 ETA6
+        0.00E+00  0.00E+00  0.00E+00  0.00E+00  0.00E+00  0.00E+00
 ETA7
+        0.00E+00  0.00E+00  0.00E+00  0.00E+00  0.00E+00  0.00E+00  0.00E+00

 SIGMA - COV MATRIX FOR RANDOM EFFECTS - EPSILONS  ****
         EPS1
 EPS1
+        6.09E-02

 OMEGA - CORR MATRIX FOR RANDOM EFFECTS - ETAS  *******
         ETA1      ETA2      ETA3      ETA4      ETA5      ETA6      ETA7
 ETA1
+        6.08E-01
 ETA2
+       -8.76E-01  2.71E+00
 ETA3
+        0.00E+00  0.00E+00  0.00E+00
 ETA4
+        0.00E+00  0.00E+00  0.00E+00  0.00E+00
 ETA5
+        0.00E+00  0.00E+00  0.00E+00  0.00E+00  0.00E+00
 ETA6
+        0.00E+00  0.00E+00  0.00E+00  0.00E+00  0.00E+00  0.00E+00
 ETA7
+        0.00E+00  0.00E+00  0.00E+00  0.00E+00  0.00E+00  0.00E+00  0.00E+00

 SIGMA - CORR MATRIX FOR RANDOM EFFECTS - EPSILONS  ***
         EPS1
 EPS1
+        2.47E-01
 Elapsed postprocess time in seconds:     0.00
 Elapsed finaloutput time in seconds:     0.00
 PROBLEM NO.:           1      SUBPROBLEM NO.:           2
 SIMULATION STEP PERFORMED
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 Elapsed simulation  time in seconds:     0.00
 #TBLN:      2
 #METH: NUTS Bayesian Analysis
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
 #TERM:
 BURN-IN WAS NOT TESTED FOR CONVERGENCE
 STATISTICAL PORTION WAS NOT PERFORMED

 ETABAR IS THE ARITHMETIC MEAN OF THE ETA-ESTIMATES,
 AND THE P-VALUE IS GIVEN FOR THE NULL HYPOTHESIS THAT THE TRUE MEAN IS 0.

 ETABAR:         1.2692E-02 -4.0587E-01  0.0000E+00  0.0000E+00  0.0000E+00  0.0000E+00  0.0000E+00
 SE:             7.8860E-02  4.8335E-02  0.0000E+00  0.0000E+00  0.0000E+00  0.0000E+00  0.0000E+00
 N:                      39          39           0           0           0           0           0

 P VAL.:         8.7214E-01  4.6335E-17  1.0000E+00  1.0000E+00  1.0000E+00  1.0000E+00  1.0000E+00

 ETASHRINKSD(%)  1.0000E-10  8.9357E+01  0.0000E+00  0.0000E+00  0.0000E+00  0.0000E+00  0.0000E+00
 ETASHRINKVR(%)  1.0000E-10  9.8867E+01  0.0000E+00  0.0000E+00  0.0000E+00  0.0000E+00  0.0000E+00
 EBVSHRINKSD(%)         NaN         NaN  0.0000E+00  0.0000E+00  0.0000E+00  0.0000E+00  0.0000E+00
 EBVSHRINKVR(%)         NaN         NaN  0.0000E+00  0.0000E+00  0.0000E+00  0.0000E+00  0.0000E+00
 RELATIVEINF(%)  0.0000E+00  0.0000E+00  0.0000E+00  0.0000E+00  0.0000E+00  0.0000E+00  0.0000E+00
 EPSSHRINKSD(%)  7.4419E+00
 EPSSHRINKVR(%)  1.4330E+01


 TOTAL DATA POINTS NORMALLY DISTRIBUTED (N):          310
 N*LOG(2PI) CONSTANT TO OBJECTIVE FUNCTION:    569.74189058689706
 OBJECTIVE FUNCTION VALUE WITHOUT CONSTANT:    1318.5087923623646
 OBJECTIVE FUNCTION VALUE WITH CONSTANT:       1888.2506829492618
 REPORTED OBJECTIVE FUNCTION DOES NOT CONTAIN CONSTANT

 TOTAL EFFECTIVE ETAS (NIND*NETA):                            78
 NIND*NETA*LOG(2PI) CONSTANT TO OBJECTIVE FUNCTION:    143.35441117992895
 OBJECTIVE FUNCTION VALUE WITHOUT CONSTANT:    1318.5087923623646
 OBJECTIVE FUNCTION VALUE WITH CONSTANT:       1461.8632035422936
 REPORTED OBJECTIVE FUNCTION DOES NOT CONTAIN CONSTANT

 PRIOR CONSTANT TO OBJECTIVE FUNCTION:    10.514955398777966
 OBJECTIVE FUNCTION VALUE WITHOUT CONSTANT:    1318.5087923623646
 OBJECTIVE FUNCTION VALUE WITH CONSTANT:       1329.0237477611427
 REPORTED OBJECTIVE FUNCTION DOES NOT CONTAIN CONSTANT


 #TERE:
 Elapsed estimation  time in seconds:     0.18

 ********************                              NUTS BAYESIAN ANALYSIS                            ********************
 #OBJT:**************                       AVERAGE VALUE OF LIKELIHOOD FUNCTION                     ********************
 #OBJV:********************************************     1318.509       **************************************************
 #OBJS:********************************************        0.000 (STD) **************************************************

 ********************                              NUTS BAYESIAN ANALYSIS                            ********************
 ********************                             FINAL PARAMETER ESTIMATE                           ********************

 THETA - VECTOR OF FIXED EFFECTS PARAMETERS   *********
         TH 1      TH 2      TH 3      TH 4      TH 5
         6.02E+00  3.87E+00  5.04E+00  6.92E+00 -1.43E+00

 OMEGA - COV MATRIX FOR RANDOM EFFECTS - ETAS  ********
         ETA1      ETA2      ETA3      ETA4      ETA5      ETA6      ETA7
 ETA1
+        2.04E-01
 ETA2
+        4.44E-01  8.04E+00
 ETA3
+        0.00E+00  0.00E+00  0.00E+00
 ETA4
+        0.00E+00  0.00E+00  0.00E+00  0.00E+00
 ETA5
+        0.00E+00  0.00E+00  0.00E+00  0.00E+00  0.00E+00
 ETA6
+        0.00E+00  0.00E+00  0.00E+00  0.00E+00  0.00E+00  0.00E+00
 ETA7
+        0.00E+00  0.00E+00  0.00E+00  0.00E+00  0.00E+00  0.00E+00  0.00E+00

 SIGMA - COV MATRIX FOR RANDOM EFFECTS - EPSILONS  ****
         EPS1
 EPS1
+        3.47E+00

 OMEGA - CORR MATRIX FOR RANDOM EFFECTS - ETAS  *******
         ETA1      ETA2      ETA3      ETA4      ETA5      ETA6      ETA7
 ETA1
+        4.52E-01
 ETA2
+        3.46E-01  2.84E+00
 ETA3
+        0.00E+00  0.00E+00  0.00E+00
 ETA4
+        0.00E+00  0.00E+00  0.00E+00  0.00E+00
 ETA5
+        0.00E+00  0.00E+00  0.00E+00  0.00E+00  0.00E+00
 ETA6
+        0.00E+00  0.00E+00  0.00E+00  0.00E+00  0.00E+00  0.00E+00
 ETA7
+        0.00E+00  0.00E+00  0.00E+00  0.00E+00  0.00E+00  0.00E+00  0.00E+00

 SIGMA - CORR MATRIX FOR RANDOM EFFECTS - EPSILONS  ***
         EPS1
 EPS1
+        1.86E+00
 Elapsed postprocess time in seconds:     0.00
 Elapsed finaloutput time in seconds:     0.00
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 #CPUT: Total CPU Time in Seconds,       14.824
