Fri Nov 24 17:45:38 EST 2023
$PROBLEM From bbr: see 2004.yaml for details

$INPUT C ID TIME AMT DV CMT DOSE EVID MDV ADDL II SS FORM WT PER BLQ NUM

$DATA ../../../../data/derived/atorvWrkShop3.csv IGNORE=(C='C', BLQ.EQ.1)

$SUBROUTINES ADVAN4 TRANS4

$PK

NWT = LOG(WT/70) ; normalized to 70 kg adult
MU_1 = THETA(1) + NWT * 0.75 ; CL
MU_2 = THETA(2) + NWT        ; V2
MU_3 = THETA(3) + NWT * 0.75 ; Q
MU_4 = THETA(4) + NWT        ; V3
MU_5 = THETA(5)              ; ka

CL = EXP(MU_1 + ETA(1)) ; atv cl
V2 = EXP(MU_2 + ETA(2))
Q  = EXP(MU_3 + ETA(3))
V3 = EXP(MU_4 + ETA(4))
KA = EXP(MU_5 + ETA(5))

S2 = V2/1000          ; DOSE IN mmol & CONC IN nM

$THETA
( 5.65)     ;  THETA(1) TOTAL CL ATV
( 5.6 )      ;  THETA(2) V2
( 4.29)     ;  THETA(3) Q
( 7.07)     ;  THETA(4) V3
( -1.33)    ;  THETA(5) KA

$OMEGA BLOCK(2) ;INITIAL values of OMEGAs
0.1  ; cl
0.003 0.2  ; v2

$OMEGA 0 FIX
$OMEGA 0 FIX
$OMEGA 0 FIX
$OMEGA 0 FIX
$OMEGA 0 FIX

$SIGMA  ;Initial value of SIGMA
0.1; prop

$ERROR

IPRED = F;
Y = IPRED*(1+ERR(1)) ; ATV

$PRIOR NWPRI

$THETAP          ; Prior information of THETAS
( 5.65  FIX)     ;  THETA(1) TOTAL CL ATV
( 5.6  FIX)      ;  THETA(2) V2
( 4.29  FIX)     ;  THETA(3) Q
( 7.07  FIX)     ;  THETA(4) V3
( -0.925)    ;  THETA(5) KA; log(exp(-1.33)*1.5) increase by 50%

$THETAPV BLOCK(5)     ;  variances for priors on THETAS (var-cov)
2 FIX ; CL weakly informative
0.00 2  ; V2 weakly informative
0.00 0.00 2  ; Q weakly informative
0.00 0.00 0.00 .0156   ; V3 SE**2 informative
0.00 0.00 0.00 0.00 .00684    ; KA SE**2 informative

$OMEGAP BLOCK(2)   ; prior information for OMEGA
.1003   FIXED         ; cl
.06034    .8477       ; v2

$OMEGAPD (4.0, FIXED)     ; df for OMEGA prior

$SIGMAP
0.1 FIX           ; 1 prop error

$SIGMAPD (1 FIX)

$EST METHOD=CHAIN FILE=../init.chn NSAMPLE=0 ISAMPLE=1 SEED=1
  CTYPE=0 IACCEPT=0.25 DF=10 DFS=0

$EST MAXEVAL=9999 METHOD=NUTS INTERACTION AUTO=2 CTYPE=0
  OLKJDF=2 OVARF=1 NUTS_DELTA=0.95 NBURN = 1000 NITER = 2000
  SEED=1 PRINT=1 NOABORT THIN = 1 RANMETHOD=P PARAFPRINT=10000
  BAYES_PHI_STORE=1

$TABLE NUM CL V2 Q KA V3 ETAS(1:LAST) EPRED IPRED NPDE EWRES NOPRINT ONEHEADER FILE=./2004.tab

NM-TRAN MESSAGES
 WARNINGS AND ERRORS (IF ANY) FOR PROBLEM    1
 (WARNING  2) NM-TRAN INFERS THAT THE DATA ARE POPULATION.
 (MU_WARNING 26) DATA ITEM(S) USED IN DEFINITION OF MU_(S) SHOULD BE CONSTANT FOR INDIV. REC.:
  WT
 LIM VALUES MAXLIM ASSESSED BY NMTRAN: 1,2,3,4,5,6,7,8,10,11,13,15,16
Note: Analytical 2nd Derivatives are constructed in FSUBS but are never used.
      You may insert $ABBR DERIV2=NO after the first $PROB to save FSUBS construction and compilation time

1NONLINEAR MIXED EFFECTS MODEL PROGRAM (NONMEM) VERSION 7.5.1
 ORIGINALLY DEVELOPED BY STUART BEAL, LEWIS SHEINER, AND ALISON BOECKMANN
 CURRENT DEVELOPERS ARE ROBERT BAUER, ICON DEVELOPMENT SOLUTIONS,
 AND ALISON BOECKMANN. IMPLEMENTATION, EFFICIENCY, AND STANDARDIZATION
 PERFORMED BY NOUS INFOSYSTEMS.
 PROBLEM NO.:         1
 From bbr: see 2004.yaml for details
 TOT. NO. OF OBS RECS:      310
 TOT. NO. OF INDIVIDUALS:       39
 TWO COMPARTMENT MODEL WITH FIRST-ORDER ABSORPTION (ADVAN4)
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 #TBLN:      1
 #METH: Chain Method Processing
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 #TBLN:      1
 #METH: NUTS Bayesian Analysis
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
 #TERM:
 BURN-IN WAS NOT TESTED FOR CONVERGENCE
 STATISTICAL PORTION WAS COMPLETED

 ETABAR IS THE ARITHMETIC MEAN OF THE ETA-ESTIMATES,
 AND THE P-VALUE IS GIVEN FOR THE NULL HYPOTHESIS THAT THE TRUE MEAN IS 0.

 ETABAR:         1.2967E-02  1.7290E-02  0.0000E+00  0.0000E+00  0.0000E+00  0.0000E+00  0.0000E+00
 SE:             7.0961E-02  1.4273E-01  0.0000E+00  0.0000E+00  0.0000E+00  0.0000E+00  0.0000E+00
 N:                      39          39           0           0           0           0           0

 P VAL.:         8.5501E-01  9.0358E-01  1.0000E+00  1.0000E+00  1.0000E+00  1.0000E+00  1.0000E+00

 ETASHRINKSD(%)  6.8166E+00  1.2362E+01  0.0000E+00  0.0000E+00  0.0000E+00  0.0000E+00  0.0000E+00
 ETASHRINKVR(%)  1.3169E+01  2.3196E+01  0.0000E+00  0.0000E+00  0.0000E+00  0.0000E+00  0.0000E+00
 EBVSHRINKSD(%)  2.2806E+00  1.0257E+01  0.0000E+00  0.0000E+00  0.0000E+00  0.0000E+00  0.0000E+00
 EBVSHRINKVR(%)  4.5091E+00  1.9461E+01  0.0000E+00  0.0000E+00  0.0000E+00  0.0000E+00  0.0000E+00
 RELATIVEINF(%)  0.0000E+00  0.0000E+00  0.0000E+00  0.0000E+00  0.0000E+00  0.0000E+00  0.0000E+00
 EPSSHRINKSD(%)  1.3027E+01
 EPSSHRINKVR(%)  2.4357E+01


 TOTAL DATA POINTS NORMALLY DISTRIBUTED (N):          310
 N*LOG(2PI) CONSTANT TO OBJECTIVE FUNCTION:    569.74189058689706
 OBJECTIVE FUNCTION VALUE WITHOUT CONSTANT:   -76.677923119488682
 OBJECTIVE FUNCTION VALUE WITH CONSTANT:       493.06396746740836
 REPORTED OBJECTIVE FUNCTION DOES NOT CONTAIN CONSTANT

 TOTAL EFFECTIVE ETAS (NIND*NETA):                            78
 NIND*NETA*LOG(2PI) CONSTANT TO OBJECTIVE FUNCTION:    143.35441117992895
 OBJECTIVE FUNCTION VALUE WITHOUT CONSTANT:   -76.677923119488682
 OBJECTIVE FUNCTION VALUE WITH CONSTANT:       66.676488060440263
 REPORTED OBJECTIVE FUNCTION DOES NOT CONTAIN CONSTANT

 PRIOR CONSTANT TO OBJECTIVE FUNCTION:    10.514955398777966
 OBJECTIVE FUNCTION VALUE WITHOUT CONSTANT:   -76.677923119488682
 OBJECTIVE FUNCTION VALUE WITH CONSTANT:      -66.162967720710711
 REPORTED OBJECTIVE FUNCTION DOES NOT CONTAIN CONSTANT


 #TERE:
 Elapsed estimation  time in seconds:   686.55
 Elapsed covariance  time in seconds:     0.00

 ********************                              NUTS BAYESIAN ANALYSIS                            ********************
 #OBJT:**************                       AVERAGE VALUE OF LIKELIHOOD FUNCTION                     ********************
 #OBJV:********************************************      -76.678       **************************************************
 #OBJS:********************************************       18.191 (STD) **************************************************

 ********************                              NUTS BAYESIAN ANALYSIS                            ********************
 ********************                             FINAL PARAMETER ESTIMATE                           ********************

 THETA - VECTOR OF FIXED EFFECTS PARAMETERS   *********
         TH 1      TH 2      TH 3      TH 4      TH 5
         6.66E+00  7.59E+00  5.89E+00  7.54E+00 -1.18E+00

 OMEGA - COV MATRIX FOR RANDOM EFFECTS - ETAS  ********
         ETA1      ETA2      ETA3      ETA4      ETA5      ETA6      ETA7
 ETA1
+        2.26E-01
 ETA2
+        2.09E-01  1.03E+00
 ETA3
+        0.00E+00  0.00E+00  0.00E+00
 ETA4
+        0.00E+00  0.00E+00  0.00E+00  0.00E+00
 ETA5
+        0.00E+00  0.00E+00  0.00E+00  0.00E+00  0.00E+00
 ETA6
+        0.00E+00  0.00E+00  0.00E+00  0.00E+00  0.00E+00  0.00E+00
 ETA7
+        0.00E+00  0.00E+00  0.00E+00  0.00E+00  0.00E+00  0.00E+00  0.00E+00

 SIGMA - COV MATRIX FOR RANDOM EFFECTS - EPSILONS  ****
         EPS1
 EPS1
+        1.19E-01

 OMEGA - CORR MATRIX FOR RANDOM EFFECTS - ETAS  *******
         ETA1      ETA2      ETA3      ETA4      ETA5      ETA6      ETA7
 ETA1
+        4.72E-01
 ETA2
+        4.39E-01  9.99E-01
 ETA3
+        0.00E+00  0.00E+00  0.00E+00
 ETA4
+        0.00E+00  0.00E+00  0.00E+00  0.00E+00
 ETA5
+        0.00E+00  0.00E+00  0.00E+00  0.00E+00  0.00E+00
 ETA6
+        0.00E+00  0.00E+00  0.00E+00  0.00E+00  0.00E+00  0.00E+00
 ETA7
+        0.00E+00  0.00E+00  0.00E+00  0.00E+00  0.00E+00  0.00E+00  0.00E+00

 SIGMA - CORR MATRIX FOR RANDOM EFFECTS - EPSILONS  ***
         EPS1
 EPS1
+        3.45E-01

 ********************                              NUTS BAYESIAN ANALYSIS                            ********************
 ********************                STANDARD ERROR OF ESTIMATE (From Sample Variance)               ********************

 THETA - VECTOR OF FIXED EFFECTS PARAMETERS   *********
         TH 1      TH 2      TH 3      TH 4      TH 5
         9.24E-02  2.73E-01  2.37E-01  1.06E-01  1.01E-01

 OMEGA - COV MATRIX FOR RANDOM EFFECTS - ETAS  ********
         ETA1      ETA2      ETA3      ETA4      ETA5      ETA6      ETA7
 ETA1
+        5.66E-02
 ETA2
+        1.01E-01  4.22E-01
 ETA3
+        0.00E+00  0.00E+00  0.00E+00
 ETA4
+        0.00E+00  0.00E+00  0.00E+00  0.00E+00
 ETA5
+        0.00E+00  0.00E+00  0.00E+00  0.00E+00  0.00E+00
 ETA6
+        0.00E+00  0.00E+00  0.00E+00  0.00E+00  0.00E+00  0.00E+00
 ETA7
+        0.00E+00  0.00E+00  0.00E+00  0.00E+00  0.00E+00  0.00E+00  0.00E+00

 SIGMA - COV MATRIX FOR RANDOM EFFECTS - EPSILONS  ****
         EPS1
 EPS1
+        1.16E-02

 OMEGA - CORR MATRIX FOR RANDOM EFFECTS - ETAS  *******
         ETA1      ETA2      ETA3      ETA4      ETA5      ETA6      ETA7
 ETA1
+        5.85E-02
 ETA2
+        1.60E-01  1.91E-01
 ETA3
+        0.00E+00  0.00E+00  0.00E+00
 ETA4
+        0.00E+00  0.00E+00  0.00E+00  0.00E+00
 ETA5
+        0.00E+00  0.00E+00  0.00E+00  0.00E+00  0.00E+00
 ETA6
+        0.00E+00  0.00E+00  0.00E+00  0.00E+00  0.00E+00  0.00E+00
 ETA7
+        0.00E+00  0.00E+00  0.00E+00  0.00E+00  0.00E+00  0.00E+00  0.00E+00

 SIGMA - CORR MATRIX FOR RANDOM EFFECTS - EPSILONS  ***
         EPS1
 EPS1
+        1.67E-02
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 Elapsed postprocess time in seconds:     0.36
 Elapsed finaloutput time in seconds:     0.07
 #CPUT: Total CPU Time in Seconds,     1072.915
